<?xml version="1.0"?>
<?xml-stylesheet type="text/xsl" href="http://jsbsim.sourceforge.net/JSBSim.xsl"?>
<fdm_config name="G91" version="2.0" release="ALPHA"
            xmlns:xsi="http://www.w3.org/2001/XMLSchema-instance"
            xsi:noNamespaceSchemaLocation="http://jsbsim.sourceforge.net/JSBSim.xsd">

    <!--
    Adriano Bassignana (abassign) Aeromatic and integration with Datcom datas
    Necolatis for aerodynamics with Pro version of Datcom+
    -->

    <fileheader>
        <author> Aeromatic v 0.95, Adriano Bassignana (abassign), Necolatis, Joshua Davidson (it0uchpods) </author>
        <filecreationdate>2015-08-01</filecreationdate>
        <version>$Revision: 1.15 $</version>
        <description> Models a G91. </description>
    </fileheader>

    <!--
    Notes:
    For class detail description look in this link: http://jsbsim.sourceforge.net/JSBSim/classJSBSim_1_1FGSwitch.html
    -->

    <!--
    File:     unnamed.xml
    Inputs:
    name:          unnamed
    type:          single-engine transonic/supersonic fighter
    max weight:    12127.5 lb
    wing span:     28.08 ft
    length:        33.76 ft
    wing area:     176.75 sq-ft
    gear type:     tricycle
    retractable?:  yes
    # engines:     1
    engine type:   turbine
    engine layout: aft fuselage
    Outputs:
    wing loading:  68.61 lb/sq-ft
    payload:       3328.8 lbs
    CL-alpha:      3.5 per radian
    CL-0:          0.08
    CL-max:        1
    CD-0:          0.021
    K:             0.12
    -->

    <system file="G91-manual-switches"/>
    <system file="G91-handle-switches"/>
    <system file="G91-electric"/>
    <system file="G91-active-stability"/>
    <system file="G91-hydraulic"/>
    <system file="G91-gear"/>
    <system file="G91-flight-control"/>
    <system file="G91-warning-lights"/>
    <system file="G91-lightning"/>
    <system file="G91-fuel"/>
    <system file="G91-canopy"/>
    <system file="G91-airbrake"/>
    <system file="G91-JATO"/>
    <system file="G91-gauges"/>
    <system file="G91-starter"/>
    <system file="G91-engine"/>
    <system file="G91-engine-sound"/>
    <system file="G91-stations"/>
    <system file="G91-servo-wings"/>

    <!-- for testing -->
    <system file="PHI-old"/>

    <!--
    <system file="radio-PTR175"/>
    <system file="ADF-Marconi-8283"/>
    -->

    <system file="pippo"/>

    <metrics>
        <wingarea  unit="FT2">  176.75 </wingarea>
        <wingspan  unit="FT" >   28.08 </wingspan>
        <wing_incidence unit="DEG"> 1.00 </wing_incidence>
        <chord     unit="FT" >    6.29 </chord>
        <htailarea unit="FT2">   27.88 </htailarea>
        <htailarm  unit="FT" >   14.40 </htailarm>
        <vtailarea unit="FT2">   18.73 </vtailarea>
        <vtailarm  unit="FT" >   16.34 </vtailarm>
        <!--
        Center of pressure calc by DATCOM
        XAC = 0.26341 -> 206 in (0,263 (XAC) * 96.85 (wing chord) + 181)
        -->
        <location name="AERORP" unit="IN">
            <x> 206.00 </x>
            <y>   0.00 </y>
            <z> -13.38 </z>
        </location>
        <location name="EYEPOINT" unit="IN">
            <x>  2.71 </x>
            <y>  0.00 </y>
            <z>  0.83 </z>
        </location>
        <location name="VRP" unit="IN">
            <x>0</x>
            <y>0</y>
            <z>0</z>
        </location>
    </metrics>

    <mass_balance>
        <description>
            CG Empty (39%) : 17.71 ft (5.40 m) or 212"
            CG Full load (20%) : 15.16 ft (4.62 m) or 181"
        </description>
        <ixx unit="SLUG*FT2">   5324.8701  </ixx>
        <iyy unit="SLUG*FT2">  12406.2168  </iyy>
        <izz unit="SLUG*FT2">  13853.4443  </izz>
        <ixy unit="SLUG*FT2">      0.0     </ixy>
        <ixz unit="SLUG*FT2">    594.9233  </ixz>
        <iyz unit="SLUG*FT2">      0.0     </iyz>
        <emptywt unit="LBS" >   6834.0 </emptywt>
        <location name="CG" unit="IN">

            <x> 205.00 </x>
            <y>   0.00 </y>
            <z>   0.00 </z>
        </location>

        <pointmass name="hardPointDxExternal">
            <weight unit="LBS"> 0 </weight>
            <form shape="cylinder">
                <radius unit="M">0.2</radius>
                <length unit="M">2.0</length>
            </form>
            <location name="POINTMASS" unit="IN">
                <x> 251.1 </x>
                <y> 113.7 </y>
                <z> -36.61 </z>
            </location>
        </pointmass>

        <pointmass name="hardPointDxInternal">
            <weight unit="LBS"> 0 </weight>
            <form shape="cylinder">
                <radius unit="M">0.2</radius>
                <length unit="M">2.0</length>
            </form>
            <location name="POINTMASS" unit="IN">
                <x> 212.50 </x>
                <y> 79.92 </y>
                <z> -36.61 </z>
            </location>
        </pointmass>

        <pointmass name="hardPointSxInternal">
            <weight unit="LBS"> 0 </weight>
            <form shape="cylinder">
                <radius unit="M">0.2</radius>
                <length unit="M">2.0</length>
            </form>
            <location name="POINTMASS" unit="IN">
                <x> 212.50 </x>
                <y> -79.92 </y>
                <z> -36.61 </z>
            </location>
        </pointmass>

        <pointmass name="hardPointSxExternal">
            <weight unit="LBS"> 0 </weight>
            <form shape="cylinder">
                <radius unit="M">0.2</radius>
                <length unit="M">2.0</length>
            </form>
            <location name="POINTMASS" unit="IN">
                <x> 251.1 </x>
                <y> -113.7 </y>
                <z> -36.61 </z>
            </location>
        </pointmass>

        <!-- JATO M8 1-2-3-4 -->

        <pointmass name="JATO M8 1 DRY">
            <weight unit="LBS"> 0 </weight>
            <location name="POINTMASS" unit="M">
                <x> 6.1 </x>
                <y> -0.34 </y>
                <z> -0.83 </z>
            </location>
        </pointmass>

        <pointmass name="JATO M8 2 DRY">
            <weight unit="LBS"> 0 </weight>
            <location name="POINTMASS" unit="M">
                <x> 6.1 </x>
                <y> -0.11 </y>
                <z> -0.83 </z>
            </location>
        </pointmass>

        <pointmass name="JATO M8 3 DRY">
            <weight unit="LBS"> 0 </weight>
            <location name="POINTMASS" unit="M">
                <x> 6.1 </x>
                <y> 0.34 </y>
                <z> -0.83 </z>
            </location>
        </pointmass>

        <pointmass name="JATO M8 4 DRY">
            <weight unit="LBS"> 0 </weight>
            <location name="POINTMASS" unit="M">
                <x> 6.1 </x>
                <y> 0.11 </y>
                <z> -0.83 </z>
            </location>
        </pointmass>

    </mass_balance>

    <ground_reactions>
        <contact type="BOGEY" name="NOSE">
            <location unit="IN">
                <x> 95.3 </x>
                <y> 0.0 </y>
                <z> 0.0 </z>
            </location>
            <static_friction>  0.80 </static_friction>
            <dynamic_friction> 0.50 </dynamic_friction>
            <!--
            <function type="CORNERING_COEFF">
                <table>
                    <independentVar>gear/slip-angle-calc</independentVar>
                    <tableData>
                        0.0     0.0
                        2.0     0.1
                        4.0     0.2
                        6.0     0.25
                        8.0     0.29
                        10.0    0.38
                    </tableData>
                </table>
            </function>
            -->
            <rolling_friction> 0.02 </rolling_friction>
            <spring_coeff unit="LBS/FT">       50000.0 </spring_coeff>
            <damping_coeff unit="LBS/FT/SEC">  10000.0 </damping_coeff>
            <damping_coeff_rebound unit="LBS/FT/SEC">2600.0</damping_coeff_rebound>
            <max_steer unit="DEG">0</max_steer>
            <brake_group>NONE</brake_group>
            <retractable>1</retractable>
            <relaxation_velocity>
                <rolling unit="FT/SEC"> 1.0 </rolling>
                <side unit="FT/SEC"> 1.0 </side>
            </relaxation_velocity>
        </contact>

        <contact type="BOGEY" name="LEFT_MAIN">
            <location unit="IN">
                <x> 219.61 </x>
                <y> -54.4 </y>
                <z> 0.0 </z>
            </location>
            <static_friction>  1.30 </static_friction>
            <dynamic_friction> 1.10 </dynamic_friction>
            <rolling_friction> 0.03 </rolling_friction>
            <spring_coeff unit="LBS/FT">      25000.0 </spring_coeff>
            <damping_coeff unit="LBS/FT/SEC">  4500.0 </damping_coeff>
            <damping_coeff_rebound unit="LBS/FT/SEC">5000.0</damping_coeff_rebound>
            <max_steer unit="DEG">0</max_steer>
            <brake_group>LEFT</brake_group>
            <retractable>1</retractable>
            <relaxation_velocity>
                <rolling unit="FT/SEC"> 1.0 </rolling>
                <side unit="FT/SEC"> 1.0 </side>
            </relaxation_velocity>
        </contact>

        <contact type="BOGEY" name="RIGHT_MAIN">
            <location unit="IN">
                <x> 219.6 </x>
                <y>  54.4 </y>
                <z> 0.0 </z>
            </location>
            <static_friction>  1.30 </static_friction>
            <dynamic_friction> 1.10 </dynamic_friction>
            <rolling_friction> 0.03 </rolling_friction>
            <spring_coeff unit="LBS/FT">      25000.0 </spring_coeff>
            <damping_coeff unit="LBS/FT/SEC">  4500.0 </damping_coeff>
            <damping_coeff_rebound unit="LBS/FT/SEC">5000.0</damping_coeff_rebound>
            <max_steer unit="DEG">0</max_steer>
            <brake_group>RIGHT</brake_group>
            <retractable>1</retractable>
            <relaxation_velocity>
                <rolling unit="FT/SEC"> 1.0 </rolling>
                <side unit="FT/SEC"> 1.0 </side>
            </relaxation_velocity>
        </contact>

        <contact type="STRUCTURE" name="LEFT_WING_TIP_BOTTOM">
            <location unit="IN">
                <x> 276.0 </x>
                <y> -169.0 </y>
                <z> -12.59 </z>
            </location>
            <static_friction>  1.80 </static_friction>
            <dynamic_friction> 1.50 </dynamic_friction>
            <spring_coeff unit="LBS/FT">                10000 </spring_coeff>
            <damping_coeff unit="LBS/FT/SEC">            2000 </damping_coeff>
            <damping_coeff_rebound unit="LBS/FT/SEC">   40000 </damping_coeff_rebound>
        </contact>

        <contact type="STRUCTURE" name="RIGHT_WING_TIP_BOTTOM">
            <location unit="IN">
                <x> 276.0 </x>
                <y> 169.0 </y>
                <z> -12.59 </z>
            </location>
            <static_friction>  1.80 </static_friction>
            <dynamic_friction> 1.50 </dynamic_friction>
            <spring_coeff unit="LBS/FT">                10000 </spring_coeff>
            <damping_coeff unit="LBS/FT/SEC">            2000 </damping_coeff>
            <damping_coeff_rebound unit="LBS/FT/SEC">   40000 </damping_coeff_rebound>
        </contact>

        <contact type="STRUCTURE" name="LEFT_WING_TIP_TOP">
            <location unit="IN">
                <x> 276.0 </x>
                <y> -169.0 </y>
                <z> -5.0</z>
            </location>
            <static_friction>  1.80 </static_friction>
            <dynamic_friction> 1.50 </dynamic_friction>
            <spring_coeff unit="LBS/FT">                10000 </spring_coeff>
            <damping_coeff unit="LBS/FT/SEC">            2000 </damping_coeff>
            <damping_coeff_rebound unit="LBS/FT/SEC">   40000 </damping_coeff_rebound>
        </contact>

        <contact type="STRUCTURE" name="RIGHT_WING_TIP_TOP">
            <location unit="IN">
                <x> 276.0 </x>
                <y> 169.0 </y>
                <z> -5.0</z>
            </location>
            <static_friction>  1.80 </static_friction>
            <dynamic_friction> 1.50 </dynamic_friction>
            <spring_coeff unit="LBS/FT">                10000 </spring_coeff>
            <damping_coeff unit="LBS/FT/SEC">            2000 </damping_coeff>
            <damping_coeff_rebound unit="LBS/FT/SEC">   40000 </damping_coeff_rebound>
        </contact>

        <contact type="STRUCTURE" name="TAIL_BOTTOM">
            <location unit="IN">
                <x> 327 </x>
                <y> 0 </y>
                <z>  -13.6 </z>
            </location>
            <static_friction>  0.80 </static_friction>
            <dynamic_friction> 0.50 </dynamic_friction>
            <spring_coeff unit="LBS/FT">                10000 </spring_coeff>
            <damping_coeff unit="LBS/FT/SEC">            2000 </damping_coeff>
            <damping_coeff_rebound unit="LBS/FT/SEC">   40000 </damping_coeff_rebound>
        </contact>

        <contact type="STRUCTURE" name="C1">
            <location unit="IN">
                <x> 55.08 </x>
                <y> 0 </y>
                <z> 31.6 </z>
            </location>
            <static_friction>  0.80 </static_friction>
            <dynamic_friction> 0.50 </dynamic_friction>
            <spring_coeff unit="LBS/FT">                10000 </spring_coeff>
            <damping_coeff unit="LBS/FT/SEC">            2000 </damping_coeff>
            <damping_coeff_rebound unit="LBS/FT/SEC">   40000 </damping_coeff_rebound>
        </contact>

        <contact type="STRUCTURE" name="C2">
            <location unit="IN">
                <x> 92.52 </x>
                <y> 0 </y>
                <z> 31.6 </z>
            </location>
            <static_friction>  0.80 </static_friction>
            <dynamic_friction> 0.50 </dynamic_friction>
            <spring_coeff unit="LBS/FT">                10000 </spring_coeff>
            <damping_coeff unit="LBS/FT/SEC">            2000 </damping_coeff>
            <damping_coeff_rebound unit="LBS/FT/SEC">   40000 </damping_coeff_rebound>
        </contact>

        <contact type="STRUCTURE" name="C3">
            <location unit="IN">
                <x> 142.92 </x>
                <y> 0 </y>
                <z> 48.88 </z>
            </location>
            <static_friction>  0.80 </static_friction>
            <dynamic_friction> 0.50 </dynamic_friction>
            <spring_coeff unit="LBS/FT">                10000 </spring_coeff>
            <damping_coeff unit="LBS/FT/SEC">            2000 </damping_coeff>
            <damping_coeff_rebound unit="LBS/FT/SEC">   40000 </damping_coeff_rebound>
        </contact>

        <contact type="STRUCTURE" name="C4">
            <location unit="IN">
                <x> 224.52 </x>
                <y> 0 </y>
                <z> 40.0 </z>
            </location>
            <static_friction>  1.80 </static_friction>
            <dynamic_friction> 1.50 </dynamic_friction>
            <spring_coeff unit="LBS/FT">                10000 </spring_coeff>
            <damping_coeff unit="LBS/FT/SEC">            2000 </damping_coeff>
            <damping_coeff_rebound unit="LBS/FT/SEC">   40000 </damping_coeff_rebound>
        </contact>

        <contact type="STRUCTURE" name="C5">
            <location unit="IN">
                <x> 342.6 </x>
                <y> 0 </y>
                <z> 57.88 </z>
            </location>
            <static_friction>  0.80 </static_friction>
            <dynamic_friction> 0.50 </dynamic_friction>
            <spring_coeff unit="LBS/FT">                10000 </spring_coeff>
            <damping_coeff unit="LBS/FT/SEC">            2000 </damping_coeff>
            <damping_coeff_rebound unit="LBS/FT/SEC">   40000 </damping_coeff_rebound>
        </contact>

        <contact type="STRUCTURE" name="C6">
            <location unit="IN">
                <x> 391.08 </x>
                <y> 0 </y>
                <z> 19.0 </z>
            </location>
            <static_friction>  1.80 </static_friction>
            <dynamic_friction> 1.50 </dynamic_friction>
            <spring_coeff unit="LBS/FT">                10000 </spring_coeff>
            <damping_coeff unit="LBS/FT/SEC">            2000 </damping_coeff>
            <damping_coeff_rebound unit="LBS/FT/SEC">   40000 </damping_coeff_rebound>
        </contact>

        <contact type="STRUCTURE" name="C7">
            <location unit="IN">
                <x> 312.0 </x>
                <y> 0 </y>
                <z> -20.0 </z>
            </location>
            <static_friction>  1.80 </static_friction>
            <dynamic_friction> 1.50 </dynamic_friction>
            <spring_coeff unit="LBS/FT">                10000 </spring_coeff>
            <damping_coeff unit="LBS/FT/SEC">            2000 </damping_coeff>
            <damping_coeff_rebound unit="LBS/FT/SEC">   40000 </damping_coeff_rebound>
        </contact>

        <contact type="STRUCTURE" name="C8">
            <location unit="IN">
                <x> 235.2 </x>
                <y> 0 </y>
                <z> -20.72 </z>
            </location>
            <static_friction>  3.80 </static_friction>
            <dynamic_friction> 3.50 </dynamic_friction>
            <spring_coeff unit="LBS/FT">                10000 </spring_coeff>
            <damping_coeff unit="LBS/FT/SEC">            2000 </damping_coeff>
            <damping_coeff_rebound unit="LBS/FT/SEC">   40000 </damping_coeff_rebound>
        </contact>

        <contact type="STRUCTURE" name="C9">
            <location unit="IN">
                <x> 144.0 </x>
                <y> 0 </y>
                <z> -26.32 </z>
            </location>
            <static_friction>  3.80 </static_friction>
            <dynamic_friction> 3.50 </dynamic_friction>
            <spring_coeff unit="LBS/FT">                10000 </spring_coeff>
            <damping_coeff unit="LBS/FT/SEC">            2000 </damping_coeff>
            <damping_coeff_rebound unit="LBS/FT/SEC">   40000 </damping_coeff_rebound>
        </contact>

        <contact type="STRUCTURE" name="C10">
            <location unit="IN">
                <x> 38.4 </x>
                <y> 0 </y>
                <z> -15.6 </z>
            </location>
            <static_friction>  2.80 </static_friction>
            <dynamic_friction> 2.50 </dynamic_friction>
            <spring_coeff unit="LBS/FT">                10000 </spring_coeff>
            <damping_coeff unit="LBS/FT/SEC">            2000 </damping_coeff>
            <damping_coeff_rebound unit="LBS/FT/SEC">   40000 </damping_coeff_rebound>
        </contact>

    </ground_reactions>


    <propulsion>

        <engine file="ORPHEUS_MK_803">
            <location unit="M">
                <x>   7.00 </x>
                <y>   0.00 </y>
                <z>   0.00 </z>
            </location>
            <orient unit="DEG">
                <pitch> 0.00 </pitch>
                <roll>  0.00 </roll>
                <yaw>   0.00 </yaw>
            </orient>
            <feed>7</feed> <!-- The fuel keep from Collector or Manifold Tank number=7 -->
            <thruster file="direct">
                <location unit="M">
                    <x>   9.50 </x>
                    <y>   0.00 </y>
                    <z>   0.00 </z>
                </location>
                <orient unit="DEG">
                    <pitch> 0.00 </pitch>
                    <roll>  0.00 </roll>
                    <yaw>   0.00 </yaw>
                </orient>
            </thruster>
        </engine>

        <!-- Tank: Divide the tanks right and left in order to simulate the increase of inertia with full tanks -->
        <!-- Forward Tank -->
        <tank type="FUEL" number="0">
            <location unit="IN">
                <x> 212.50 </x>
                <y> 0.00 </y>
                <z> 16.14 </z>
            </location>
            <capacity unit="LBS"> 1367.00 </capacity>
            <contents unit="LBS"> 1367.00 </contents>
        </tank>

        <!-- Aft Tank Right-->
        <tank type="FUEL" number="1">
            <location unit="IN">
                <x> 212.50 </x>
                <y> 51.18 </y>
                <z> 13.00 </z>
            </location>
            <capacity unit="LBS"> 562.00 </capacity>
            <contents unit="LBS"> 562.00 </contents>
        </tank>

        <!-- Aft Tank Left -->
        <tank type="FUEL" number="2">
            <location unit="IN">
                <x> 212.50 </x>
                <y> -51.18 </y>
                <z> 13.00 </z>
            </location>
            <capacity unit="LBS"> 562.00 </capacity>
            <contents unit="LBS"> 562.00 </contents>
        </tank>

        <!-- Auxiliary Tank Right (Droppable fuel tank) -->
        <tank type="FUEL" number="3">
            <location unit="IN">
                <x> 212.50 </x>
                <y> 79.92 </y>
                <z> -36.61 </z>
            </location>
            <capacity unit="LBS"> 450.00 </capacity>
            <contents unit="LBS"> 0.00 </contents>
        </tank>

        <!-- Auxiliary Tank Left (Droppable fuel tank) -->
        <tank type="FUEL" number="4">
            <location unit="IN">
                <x> 212.50 </x>
                <y> -79.92 </y>
                <z> -36.61 </z>
            </location>
            <capacity unit="LBS"> 450.00 </capacity>
            <contents unit="LBS"> 0.00 </contents>
        </tank>

        <!-- Collector or Manifold Tank
        NOTE: The CG-load is very close to the point of support of the landing gear,
        so you can not have the Collector tank filled,
        if not before they fill the other tanks that are placed ahead of the CG.
        -->
        <tank type="FUEL" number="5">
            <location unit="IN">
                <x> 240.15 </x>
                <y> 0.00 </y>
                <z> -17.71 </z>
            </location>
            <capacity unit="LBS"> 277.00 </capacity>
            <contents unit="LBS"> 277.00 </contents>
        </tank>

        <!-- Collector tank for collector fuel tank 3-4 -->
        <tank type="FUEL" number="6">
            <location unit="IN">
                <x> 181.89 </x>
                <y> 0.00 </y>
                <z> 0.00 </z>
            </location>
            <capacity unit="LBS"> 10.00 </capacity>
            <contents unit="LBS"> 0.00 </contents>
        </tank>

        <!--
        Collector tank for propulsor collector ad cut-off
        -->
        <tank type="FUEL" number="7">
            <location unit="IN">
                <x> 181.89 </x>
                <y> 0.00 </y>
                <z> 0.00 </z>
            </location>
            <capacity unit="LBS"> 4.00 </capacity>
            <contents unit="LBS"> 4.00 </contents>
        </tank>

        <!-- JATO Engine 1 -->

        <engine file="JATO-M8-Engine">
            <location unit="M">
                <x>   6.48 </x>
                <y>   -0.34 </y>
                <z>   -0.83 </z>
            </location>
            <orient unit="DEG">
                <pitch> 15.00 </pitch>
                <roll>  0.00 </roll>
                <yaw>   0.00 </yaw>
            </orient>
            <feed>8</feed>
            <thruster file="direct">
                <location unit="M">
                    <x>   6.48 </x>
                    <y>   -0.34 </y>
                    <z>   -0.83 </z>
                </location>
                <orient unit="DEG">
                    <pitch> 15.0 </pitch>
                    <roll>  0.00 </roll>
                    <yaw>  -15.0 </yaw>
                </orient>
            </thruster>
        </engine>

        <tank type="FUEL" number="8">
            <location unit="M">
                <x>   6.10 </x>
                <y>   -0.34 </y>
                <z>   -0.83 </z>
            </location>
            <capacity unit="LBS">70</capacity>
            <contents unit="LBS">0.0</contents>
        </tank>

        <!-- JATO Engine 2 -->

        <engine file="JATO-M8-Engine">
            <location unit="M">
                <x>   6.48 </x>
                <y>   -0.11 </y>
                <z>   -0.83 </z>
            </location>
            <orient unit="DEG">
                <pitch> 0.00 </pitch>
                <roll>  0.00 </roll>
                <yaw>   0.00 </yaw>
            </orient>
            <feed>9</feed>
            <thruster file="direct">
                <location unit="M">
                    <x>   6.48 </x>
                    <y>   -0.11 </y>
                    <z>   -0.83 </z>
                </location>
                <orient unit="DEG">
                    <pitch> 25.0 </pitch>
                    <roll>  0.0 </roll>
                    <yaw>   0.0 </yaw>
                </orient>
            </thruster>
        </engine>

        <tank type="FUEL" number="9">
            <location unit="M">
                <x>   6.10 </x>
                <y>   -0.11 </y>
                <z>   -0.83 </z>
            </location>
            <capacity unit="LBS">70</capacity>
            <contents unit="LBS">0.0</contents>
        </tank>

        <!-- JATO Engine 3 -->

        <engine file="JATO-M8-Engine">
            <location unit="M">
                <x>   6.1 </x>
                <y>   0.11 </y>
                <z>   -0.83 </z>
            </location>
            <orient unit="DEG">
                <pitch> 0.00 </pitch>
                <roll>  0.00 </roll>
                <yaw>   0.00 </yaw>
            </orient>
            <feed>10</feed>
            <thruster file="direct">
                <location unit="M">
                    <x>   6.48 </x>
                    <y>   0.11 </y>
                    <z>   -0.83 </z>
                </location>
                <orient unit="DEG">
                    <pitch> 25.0 </pitch>
                    <roll>  0.0 </roll>
                    <yaw>   0.0 </yaw>
                </orient>
            </thruster>
        </engine>

        <tank type="FUEL" number="10">
            <location unit="M">
                <x>   6.10 </x>
                <y>   0.11 </y>
                <z>   -0.83 </z>
            </location>
            <capacity unit="LBS">70</capacity>
            <contents unit="LBS">0.0</contents>
        </tank>

        <!-- JATO Engine 4 -->

        <engine file="JATO-M8-Engine">
            <location unit="M">
                <x>   6.1 </x>
                <y>   0.34 </y>
                <z>   -0.83 </z>
            </location>
            <orient unit="DEG">
                <pitch> 0.00 </pitch>
                <roll>  0.00 </roll>
                <yaw>   0.00 </yaw>
            </orient>
            <feed>11</feed>
            <thruster file="direct">
                <location unit="M">
                    <x>   6.48 </x>
                    <y>   0.34 </y>
                    <z>   -0.83 </z>
                </location>
                <orient unit="DEG">
                    <pitch> 15.0 </pitch>
                    <roll>  0.00 </roll>
                    <yaw>   15.0 </yaw>
                </orient>
            </thruster>
        </engine>

        <tank type="FUEL" number="11">
            <location unit="M">
                <x>   6.10 </x>
                <y>   0.34 </y>
                <z>   -0.83 </z>
            </location>
            <capacity unit="LBS">70</capacity>
            <contents unit="LBS">0.0</contents>
        </tank>

    </propulsion>

    <flight_control name="none"/> <!-- See Systems/G91-flight-control.xml -->

    <aerodynamics> <!-- Changes by Joshua Davidson (it0uchpods) for stability, and fix some reversed signs -->

        <function name="aero/function/ground-effect-factor-lift">
            <description>Change in lift due to ground effect factor</description>
            <product>
                <v>1.0</v>
                <table>
                    <independentVar lookup="row">aero/h_b-mac-ft</independentVar>
                    <tableData>
                        0.00  1.203
                        0.10  1.127
                        0.15  1.090
                        0.20  1.073
                        0.30  1.046
                        0.40  1.055
                        0.50  1.019
                        0.60  1.013
                        0.70  1.008
                        0.80  1.006
                        0.90  1.003
                        1.00  1.002
                        1.10  1.000
                    </tableData>
                </table>
            </product>
        </function>

        <function name="aero/function/ground-effect-factor-drag">
            <description>Change in drag due to ground effect</description>
            <product>
                <v>1.0</v>
                <table>
                    <independentVar lookup="row">aero/h_b-mac-ft</independentVar>
                    <tableData>
                        0.00  0.480
                        0.10  0.515
                        0.15  0.629
                        0.20  0.709
                        0.30  0.815
                        0.40  0.882
                        0.50  0.928
                        0.60  0.962
                        0.70  0.988
                        0.80  1.000
                        0.90  1.000
                        1.00  1.000
                        1.10  1.000
                    </tableData>
                </table>
            </product>
        </function>

        <axis name="LIFT">
            <function name="aero/force/Lift_alpha">
                <description>
                    Lift due to alpha
                    Increase in CL decreases Period and damping,Dutch Roll damping
                    CL is low for landing
                </description>
                <product>
                    <property>aero/function/ground-effect-factor-lift</property>
                    <property>aero/qbar-psf</property>
                    <property>metrics/Sw-sqft</property>
                    <table>
                        <independentVar lookup="row">aero/alpha-deg</independentVar>
                        <tableData>
                            -75 -0.4065
                            -60 -1.0230
                            -45 -1.5460
                            -30 -1.5190
                            -15 -0.9745
                            -10 -0.5913
                             -5 -0.2172
                             -2 -0.0070
                              0  0.1339
                              1  0.2061
                              2  0.2796
                              5  0.5065
                             10  0.8959
                             15  1.2230
                             30  1.1920
                             45  0.7822
                             60  0.7016
                             75  0.4886
                        </tableData>
                    </table>
                </product>
            </function>

            <function name="aero/force/Lift_flap">
                <description>Delta Lift due to flaps</description>
                <product>
                    <property>aero/qbar-psf</property>
                    <property>metrics/Sw-sqft</property>
                    <property>fcs/flap-pos-deg</property>
                    <value> 0.01167 </value>
                </product>
            </function>

            <function name="aero/force/Lift_elevator">
                <description>Lift due to Elevator Deflection</description>
                <product>
                    <property>aero/qbar-psf</property>
                    <property>metrics/Sw-sqft</property>
                    <property>fcs/elevator-rad</property>
                    <value>0.2</value>
                </product>
            </function>

        </axis>

        <axis name="DRAG">
            <function name="aero/force/Drag_basic">
                <description>
                    Basic Drag Coefficient
                    Sense: Always positive
                    Main contributor to Phugoid damping: Greater Cd, Better damping
                    The drag data is elaborate by DATCOM+ software, the loop parameter is 1
                    As it does not affect the average value (loop = 2 or 3) but the value for each flight altitude (air density)
                    This option makes the speed of the airplane under the 10000 ft
                    is slightly higher than that which occurs with loop = 2 or 3, as verified in reality.
                </description>
                <product>
                    <property>aero/function/ground-effect-factor-lift</property>
                    <property>aero/qbar-psf</property>
                    <property>metrics/Sw-sqft</property>
                    <table>
                        <independentVar lookup="row">aero/alpha-deg</independentVar>
                        <independentVar lookup="column">atmosphere/density-altitude</independentVar>
                        <tableData>
                                 0       10000   20000   30000   40000   50000   60000
                            -75  0.0999  0.1015  0.1028  0.1041  0.1060  0.1085  0.1113
                            -60  0.1252  0.1280  0.1309  0.1347  0.1406  0.1498  0.1611
                            -45  0.1816  0.1863  0.1920  0.1998  0.2124  0.2321  0.2569
                            -30  0.1745  0.1792  0.1849  0.1927  0.2051  0.2245  0.2488
                            -15  0.0781  0.0808  0.0838  0.0876  0.0935  0.1025  0.1136
                            -10  0.0375  0.0394  0.0411  0.0431  0.0460  0.0502  0.0551
                             -5  0.0176  0.0191  0.0203  0.0214  0.0229  0.0248  0.0268
                             -2  0.0145  0.0160  0.0170  0.0181  0.0194  0.0209  0.0226
                              0  0.0159  0.0174  0.0184  0.0195  0.0210  0.0228  0.0246
                              1  0.0176  0.0192  0.0203  0.0215  0.0231  0.0251  0.0273
                              2  0.0201  0.0217  0.0229  0.0243  0.0260  0.0284  0.0310
                              5  0.0325  0.0343  0.0359  0.0378  0.0406  0.0445  0.0492
                             10  0.0699  0.0726  0.0754  0.0790  0.0847  0.0934  0.1042
                             15  0.1170  0.1207  0.1249  0.1307  0.1399  0.1544  0.1727
                             30  0.1294  0.1329  0.1368  0.1420  0.1500  0.1624  0.1777
                             45  0.0833  0.0856  0.0878  0.0906  0.0946  0.1006  0.1076
                             60  0.0934  0.0955  0.0974  0.0997  0.1030  0.1078  0.1134
                             75  0.1015  0.1031  0.1045  0.1060  0.1080  0.1107  0.1138
                        </tableData>
                    </table>
                </product>
            </function>

            <function name="aero/force/Drag_induced">
                <description>Induced drag</description>
                <product>
                    <property>aero/qbar-psf</property>
                    <property>metrics/Sw-sqft</property>
                    <property>aero/cl-squared</property>
                    <value>0.01</value>
                </product>
            </function>

            <function name="aero/force/Drag_mach">
                <description>Drag due to mach</description>
                <product>
                    <property>aero/qbar-psf</property>
                    <property>metrics/Sw-sqft</property>
                    <table>
                        <independentVar lookup="row">velocities/mach</independentVar>
                        <tableData>
                            0.00      0.000
                            0.81      0.015
                            1.00      0.045
                            1.10      0.043
                            2.00      0.035
                        </tableData>
                    </table>
                </product>
            </function>

            <function name="aero/force/Drag_flap">
                <description>Drag due to flaps</description>
                <product>
                    <property>aero/qbar-psf</property>
                    <property>metrics/Sw-sqft</property>
                    <property>fcs/flap-pos-deg</property>
                    <value> 0.00267 </value>
                </product>
            </function>

            <function name="aero/force/Drag_gear">
                <description>Drag due to gear</description>
                <product>
                    <property>aero/qbar-psf</property>
                    <property>metrics/Sw-sqft</property>
                    <property>gear/gear-pos-norm</property>
                    <value>0.005</value>
                </product>
            </function>

            <function name="aero/force/Drag_beta">
                <description>Drag due to sideslip</description>
                <product>
                    <property>aero/qbar-psf</property>
                    <property>metrics/Sw-sqft</property>
                    <table>
                        <independentVar lookup="row">aero/beta-rad</independentVar>
                        <tableData>
                            -1.57    1.230
                            -0.26    0.050
                            0.00    0.000
                            0.26    0.050
                            1.57    1.230
                        </tableData>
                    </table>
                </product>
            </function>

            <function name="aero/force/Drag_elevator">
                <description>Drag due to Elevator Deflection</description>
                <product>
                    <property>aero/qbar-psf</property>
                    <property>metrics/Sw-sqft</property>
                    <abs><property>fcs/elevator-pos-norm</property></abs>
                    <value>0.03</value>
                </product>
            </function>

        </axis>

        <property value="-1.2146">aero/constant/Side_beta-coefficient</property>
        <property value="1.4227">aero/constant/Side_yaw-coefficient</property>
        <property value="0.3816">aero/constant/Side_rudder-coefficient</property>

        <axis name="SIDE">
            <function name="aero/force/Side_beta">
                <description>Side force due to beta</description>
                <product>
                    <property>aero/qbar-psf</property>
                    <property>metrics/Sw-sqft</property>
                    <property>aero/beta-rad</property>
                    <property>aero/constant/Side_beta-coefficient</property>
                </product>
            </function>

            <function name="aero/force/Side_roll_rate">
               <description>Side force due to roll rate</description>
               <product>
                   <property>aero/qbar-psf</property>
                   <property>metrics/Sw-sqft</property>
                   <property>aero/bi2vel</property>
                   <property>velocities/p-aero-rad_sec</property>
                   <table>
                        <independentVar lookup="row">aero/Re</independentVar>
                        <tableData>
                            17307328  0.2160
                            19038060  0.0159
                            25960990  0.0069
                            34828468  0.0071
                        </tableData>
                   </table>
               </product>
            </function>

            <function name="aero/force/Side_yaw_rate">
               <description>Side force due to yaw rate</description>
               <product>
                   <property>aero/qbar-psf</property>
                   <property>metrics/Sw-sqft</property>
                   <property>aero/bi2vel</property>
                   <property>velocities/r-aero-rad_sec</property>
                   <property>aero/constant/Side_yaw-coefficient</property>
               </product>
            </function>

            <function name="aero/force/Side_rudder">
                <description>Side force due to rudder</description>
                <product>
                    <property>aero/qbar-psf</property>
                    <property>metrics/Sw-sqft</property>
                    <property>fcs/rudder-rad</property>
                    <property>aero/constant/Side_rudder-coefficient</property>
                </product>
            </function>
        </axis>

        <property value="-0.5112">aero/constant/Roll_damp-coefficient</property>
        <property value="0.0876">aero/constant/Roll_yaw-coefficient</property>
        <property value="0.2154">aero/constant/Roll_aileron-coefficient</property>
        <property value="-0.01141">aero/constant/Roll_rudder-coefficient</property>

        <axis name="ROLL">
            <function name="aero/coefficient/Clb">
                <description>
                    Roll Moment coefficient due to Beta(per degree)
                    Decrease of Clb to small negative value improves Dutch Roll Damping
                    High Positive value leads to excessive spiral instability
                </description>
                <product>
                    <property>aero/qbar-psf</property>
                    <property>metrics/Sw-sqft</property>
                    <property>metrics/bw-ft</property>
                    <property>aero/beta-deg</property>
                    <value>0.5812</value> <!-- Tuning factor -->
                    <table>
                        <independentVar lookup="row">aero/alpha-deg</independentVar>
                        <tableData>
                            -75 -0.00307
                            -60 -0.00040
                            -45  0.00205
                            -30  0.00275
                            -15  0.00180
                            -10  0.00060
                             -5 -0.00058
                             -2 -0.00121
                              0 -0.00164
                              1 -0.00186
                              2 -0.00209
                              5 -0.00280
                             10 -0.00403
                             15 -0.00496
                             30 -0.00296
                             45	-0.00004
                             60  0.00133
                             75  0.00293
                        </tableData>
                    </table>
                </product>
            </function>

            <function name="aero/moment/Roll_damp">
                <description>Roll moment due to roll rate</description>
                <product>
                    <property>aero/qbar-psf</property>
                    <property>metrics/Sw-sqft</property>
                    <property>metrics/bw-ft</property>
                    <property>aero/bi2vel</property>
                    <property>velocities/p-aero-rad_sec</property>
                    <property>aero/constant/Roll_damp-coefficient</property>
                </product>
            </function>

            <function name="aero/moment/Roll_yaw">
                <description>Roll moment due to yaw rate</description>
                <product>
                    <property>aero/qbar-psf</property>
                    <property>metrics/Sw-sqft</property>
                    <property>metrics/bw-ft</property>
                    <property>aero/bi2vel</property>
                    <property>velocities/r-aero-rad_sec</property>
                    <property>aero/constant/Roll_yaw-coefficient</property>
                </product>
            </function>

            <function name="aero/moment/Roll_aileron">
                <description>Roll moment due to aileron</description>
                <product>
                    <property>aero/qbar-psf</property>
                    <property>metrics/Sw-sqft</property>
                    <property>metrics/bw-ft</property>
                    <property>fcs/aileron-pos-rad-avg</property>
                    <property>aero/constant/Roll_aileron-coefficient</property>
                </product>
            </function>

            <function name="aero/moment/Roll_rudder">
                <description>Roll moment due to rudder</description>
                <product>
                    <property>aero/qbar-psf</property>
                    <property>metrics/Sw-sqft</property>
                    <property>metrics/bw-ft</property>
                    <property>fcs/rudder-rad</property>
                    <property>aero/constant/Roll_rudder-coefficient</property>
                </product>
            </function>

        </axis>

        <property value="-14.445">aero/constant/Pitch_damp-coefficient</property>
        <property value="-0.611">aero/constant/Pitch_elevator-coefficient</property>
        <property value="-9.165">aero/constant/Pitch_alphadot-coefficient</property>

        <axis name="PITCH">
            <function name="aero/coefficient/Cm_basic"> <!-- New table by Joshua Davidson (it0uchpods) -->
                <description>
                    Basic_Pitch_moment_coefficient
                </description>
                <product>
                    <property>aero/qbar-psf</property>
                    <property>metrics/Sw-sqft</property>
                    <property>metrics/cbarw-ft</property>
                    <table>
                        <independentVar lookup="row">aero/alpha-deg</independentVar>
                        <tableData>
                            -90  0.00000
                            -75  0.07120
                            -45  0.21065
                            -30  0.15576
                            -10  0.10694
                             -5  0.04146
                              0 -0.00409
                              5 -0.04076
                             10 -0.11033
                             30 -0.16630
                             45 -0.21065
                             75 -0.07120
                             90  0.00000
                        </tableData>
                    </table>
                </product>
            </function>

            <function name="aero/moment/Pitch_elevator">
                <description>Pitch moment due to elevator</description>
                <product>
                    <property>aero/qbar-psf</property>
                    <property>metrics/Sw-sqft</property>
                    <property>metrics/cbarw-ft</property>
                    <property>fcs/elevator-rad</property>
                    <property>aero/constant/Pitch_elevator-coefficient</property>
                </product>
            </function>

            <function name="aero/moment/Pitch_damp">
                <description>Pitch moment due to pitch rate</description>
                <product>
                    <property>aero/qbar-psf</property>
                    <property>metrics/Sw-sqft</property>
                    <property>metrics/cbarw-ft</property>
                    <property>aero/ci2vel</property>
                    <property>velocities/q-aero-rad_sec</property>
                    <property>aero/constant/Pitch_damp-coefficient</property>
                </product>
            </function>

            <function name="aero/moment/Pitch_alphadot">
                <description>Pitch moment due to alpha rate</description>
                <product>
                    <property>aero/qbar-psf</property>
                    <property>metrics/Sw-sqft</property>
                    <property>metrics/cbarw-ft</property>
                    <property>aero/ci2vel</property>
                    <property>aero/alphadot-rad_sec</property>
                    <property>aero/constant/Pitch_alphadot-coefficient</property>
                </product>
            </function>

        </axis>

        <property value="0.0654">aero/constant/Yaw_beta-coefficient</property>
        <property value="-0.4112">aero/constant/Yaw_damp-coefficient</property>
        <property value="-0.0564">aero/constant/Yaw_rudder-coefficient</property>
        <property value="0.0152">aero/constant/Yaw_aileron-coefficient</property>

        <axis name="YAW">
            <function name="aero/moment/Yaw_beta">
                <description>
                    Yaw moment coefficient due to sideslip(per degree)
                    Determines Dutch Roll and Spiral characteristics
                    Prevents side-slip and yawing moments
                </description>
                <product>
                    <property>aero/qbar-psf</property>
                    <property>metrics/Sw-sqft</property>
                    <property>metrics/bw-ft</property>
                    <property>aero/beta-rad</property>
                    <property>aero/constant/Yaw_beta-coefficient</property>
                </product>
            </function>

            <function name="aero/moment/Yaw_damp">
                <description>Yaw moment due to yaw rate</description>
                <product>
                    <property>aero/qbar-psf</property>
                    <property>metrics/Sw-sqft</property>
                    <property>metrics/bw-ft</property>
                    <property>aero/bi2vel</property>
                    <property>velocities/r-aero-rad_sec</property>
                    <property>aero/constant/Yaw_damp-coefficient</property>
                </product>
            </function>

            <function name="aero/moment/Yaw_rudder">
                <description>Yaw moment due to rudder</description>
                <product>
                    <property>aero/qbar-psf</property>
                    <property>metrics/Sw-sqft</property>
                    <property>metrics/bw-ft</property>
                    <property>fcs/rudder-rad</property>
                    <property>aero/constant/Yaw_rudder-coefficient</property>
                </product>
            </function>

            <function name="aero/moment/Yaw_aileron">
                <description>Adverse yaw</description>
                <product>
                    <property>aero/qbar-psf</property>
                    <property>metrics/Sw-sqft</property>
                    <property>metrics/bw-ft</property>
                    <property>fcs/aileron-pos-rad-avg</property>
                    <property>aero/constant/Yaw_aileron-coefficient</property>
                </product>
            </function>

        </axis>

    </aerodynamics>

    <external_reactions>

        <force name="JATO-rockets" frame="BODY">
            <location unit="IN">
                <x> -49.0 </x>
                <y> 0.0 </y>
                <z> -0.80 </z>
            </location>
            <direction>
                <x> -1.0 </x>
                <y> 0.0 </y>
                <z> 0.0 </z>
            </direction>
        </force>

        <force name="Airbrake" frame="BODY">
            <location unit="IN">
                <x> 53.0 </x>
                <y> 0.0 </y>
                <z> 19.0 </z>
            </location>
            <direction>
                <x> -1.0 </x>
                <y> 0.0 </y>
                <z> 0.0 </z>
            </direction>
        </force>

        <force name="LandingGearFrontAerodinamicDrag" frame="BODY">
            <location unit="IN">
                <x> 111.0 </x>
                <y> 0.0 </y>
                <z> -15.0 </z>
            </location>
            <direction>
                <x> -1.0 </x>
                <y> 0.0 </y>
                <z> 0.0 </z>
            </direction>
        </force>

        <force name="LandingGearRightAerodinamicDrag" frame="BODY">
            <location unit="IN">
                <x> -13.0 </x>
                <y> 54.4 </y>
                <z> 0.0 </z>
            </location>
            <direction>
                <x> -1.0 </x>
                <y> 0.0 </y>
                <z> 0.0 </z>
            </direction>
        </force>

        <force name="LandingGearLeftAerodinamicDrag" frame="BODY">
            <location unit="IN">
                <x> -13.0 </x>
                <y> -54.4 </y>
                <z> 0.0 </z>
            </location>
            <direction>
                <x> -1.0 </x>
                <y> 0.0 </y>
                <z> 0.0 </z>
            </direction>
        </force>

    </external_reactions>

</fdm_config>
